Δx := 10
ρa := 0.75
Patm := 1.013*10^5
T := 10
η := 1.2*10^-4
qmin := 10^-3
Pl := 10^7
Δl := 10
Δt_const := 100
Mconst := ρa*T/Patm
k := 2.8*(10^-14)
Pr := 10^6
a := 0.8
Pmax := a*Pl
l0 := 2*T
j := 10
ll(t) := l0 + Δl*t + Δl/2
qm(t) := k*(Pl^2 - Pr^2)/ll(t)*Mconst/(2*η)
qm(0) = 0.0342053
p(t, ξ) := sqrt(Pr^2 + (Pl^2 - Pr^2)*ξ/ll(t))
ΔM1(t) := integral((p(t - 1, ξ) - p(t, ξ))*Mconst, ξ = 0 .. ll(t - 1))
ΔM2(t) := integral((Pl - p(t, ξ))*Mconst, ξ = ll(t - 1) .. ll(t))
ΔM(t) := ΔM1(t) + ΔM2(t)
Δt(t) := ΔM(t)/qm(t)
jj := 1 .. 2000
Δt(100) = 2904368
qm_matrix11[00] := 0
qm_matrix[jj] := qm(jj) - qmin
Texp[0] := 0
Jmax := 83
L0 := Jmax*Δx
qm_matrix =  # no stored result
Texp[jj] := Texp[jj - 1] + Δt(jj)
L0 = 830
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P_i_ksi(t, ξ, Li) :=
    sqrt(Pr^2 + (Pl^2 - Pr^2)*ξ/L0) if t == 0
    sqrt(P_i_ksi(t - 1, t*Δx, Li)^2 + (Pl^2 - P_i_ksi(t - 1, t*Δx, Li)^2)*(ξ - t*Δx)/(Li - t*Δx)) otherwise
Mf1(t, Li) := (P_i_ksi(t, Δx*(t + 1), Li) - P_i_ksi(t, Δx*t, Li))*t*Δx + integral(P_i_ksi(t, Δx*(t + 1), Li) - P_i_ksi(t, ξ, Li), ξ = t*Δx .. (t + 1)*Δx)
Mf1(3, 10^4) = 1096939
Mf2(t, Li, Lii) := integral(P_i_ksi(t, ξ, Li) - P_i_ksi(t + 1, ξ, Lii), ξ = (t + 1)*Δx .. Li) + integral(Pl - P_i_ksi(t + 1, ξ, Lii), ξ = Li .. Lii)
Mf2(3, 10^4, 10^4 + 400) = 1.28235e9
FS(Lii) := Mconst*(Mf1(1, L0) - Mf2(1, L0, Lii))
L0 = 830
xx := L0 + 200
Li1 := root(FS(xx), xx)
Li1 = 831.661
FS1(Li, Lii, tutu) := Mconst*(Mf1(tutu, Li) - Mf2(tutu, Li, Lii))
Li2 := root(FS1(Li1, xx, 2), xx)
Li2 = 833.989
Larr(t) :=
    L0 if t == 0
    otherwise
        for ii ∈ 1 .. t
            prev ← L0 if ii == 1
            prev ← haha otherwise
            x0 ← prev + Δx
            haha ← root(FS1(prev, x0, ii), x0)
        haha
Larr(0) = 830
Larr(1) = 831.661
Larr(2) = 833.989
qm_i(t) := 1/2*k*Mconst/(2*η)*((Pl^2 - P_i_ksi(t, t*Δx, Larr(t))^2)/(Larr(t) - t*Δx) + (Pl^2 - P_i_ksi(t + 1, (t + 1)*Δx, Larr(t + 1))^2)/(Larr(t + 1) - (t + 1)*Δx))
Δtt(t) := Mf1(t, Larr(t))/qm_i(t)
Tvos(t) :=
    0 if t == 0
    (Tvos(t) + Δtt(t)) otherwise
Plim(t) := P_i_ksi(t, (t + 1)*Δx, Larr(t)) - Pmax
