Δx := 10
ρa := 0.75
Patm := 1.013*10^5
T := 10
η := 1.2*10^-4
qmin := 0.5
Pl := 10^7
rc := 0.11
Δr := 10
Δt_const := 100
Mconst := ρa*T/Patm
k := 2.8*(10^-14)
Pc := 0.5*Pl
a := 0.8
Pmax := a*Pl
r0 := 2*T
j := 10
rr(t) := r0 + Δr*t + Δr/2
qm(t) := k*π*(Pl^2 - Pc^2)/ln(rr(t)/rc)*Mconst/η
qm(0) = 0.75015
p(t, r) := sqrt(Pc^2 + (Pl^2 - Pc^2)*ln(r/rc)/ln(rr(t)/rc))
ΔM1(t) := integral((p(t - 1, r) - p(t, r))*2*π*r, r = 0 .. rr(t - 1))
ΔM2(t) := integral((Pl - p(t, r))*(2*π*r), r = rr(t - 1) .. rr(t))
ΔM(t) := (ΔM1(t) + ΔM2(t))*Mconst
Δt(t) := ΔM(t)/qm(t)
jj := 1 .. 2000
Δt(508) = 10603323
qm_matrix11[00] := 0
qm_matrix[jj] := qm(jj) - qmin
Texp[0] := 0
Jmax := 35
R0 := Jmax*Δr
qm_matrix =  # no stored result
Texp[jj] := Texp[jj - 1] + Δt(jj)
R0 = 350
P_i_ksi(t, r, Ri) :=
    sqrt(Pc^2 + (Pl^2 - Pc^2)*ln(r/rc)/ln(R0/rc)) if t == 0
    sqrt(P_i_ksi(t - 1, rc + t*Δr, Ri)^2 + (Pl^2 - P_i_ksi(t - 1, rc + t*Δr, Ri)^2)*ln(r/(rc + t*Δr))/ln(Ri/(rc + t*Δr))) otherwise
p_i_ksi_Matrix[jj] := P_i_ksi(10, jj*Δr, 10^5)
Mf1(t, Ri) := (P_i_ksi(t, rc + Δr*(t + 1), Ri) - P_i_ksi(t, Δr*t, Ri))*π*((rc + t*Δr)^2 - rc^2) + integral((P_i_ksi(t, rc + Δr*(t + 1), Ri) - P_i_ksi(t, r, Ri))*2*π*r, r = rc + t*Δr .. rc + (t + 1)*Δr)
Mf1(7, rc + 3*10^5) = 445114688
MF1tmp(t, Ri) := (P_i_ksi(t, rc + Δr*(t + 1), Ri) - P_i_ksi(t, Δr*t, Ri))*π*((rc + t*Δr)^2 - rc^2)
MF1tmp(4, rc + 3*10^5) = 215094896
Mf2(t, Ri, Rii) := integral((P_i_ksi(t, r, Ri) - P_i_ksi(t + 1, r, Rii))*2*π*r, r = rc + (t + 1)*Δr .. Ri) + integral((Pl - P_i_ksi(t + 1, r, Rii))*2*π*r, r = Ri .. Rii)
MF2tmp(t, Ri, Rii) := integral((Pl - P_i_ksi(t + 1, r, Rii))*(2*π*r), r = Ri .. Rii)
MF2tmp(7, 3*10^5, 5 + 3*10^5) = 12568770
Mf2(3, 10^4, 10^4 + 400) = 2.86545e12
Mf2(3, 10^4, 10^4 + 500) = 3.59698e12
FS(Rii) := Mconst*(Mf1(1, R0) - Mf2(1, R0, Rii))
R0 = 350
xx := R0 + 200
Ri1 := root(FS(xx), xx)
Ri1 = 350.589
FS1(Ri, Rii, tutu) := Mconst*(Mf1(tutu, Ri) - Mf2(tutu, Ri, Rii))
Ri2 := root(FS1(Ri1, xx, 2), xx)
Ri2 = 351.538
Rarr(t) :=
    R0 if t == 0
    otherwise
        for ii ∈ 1 .. t
            prev ← R0 if ii == 1
            prev ← haha otherwise
            x0 ← prev + Δr
            haha ← root(FS1(prev, x0, ii), x0)
        haha
Rarr(0) = 350
Rarr(1) = 350.589
Rarr(7) = 361.476
Rarr(2) = 351.538
qm_i(t) := π/2*k*Mconst/η*((Pl^2 - P_i_ksi(t, rc + t*Δr, Rarr(t))^2)/ln(Rarr(t)/(rc + t*Δr)) + (Pl^2 - P_i_ksi(t + 1, rc + (t + 1)*Δr, Rarr(t + 1))^2)/ln(Rarr(t + 1)/(rc + (t + 1)*Δr)))
Δtt(t) := Mf1(t, Rarr(t))/qm_i(t)
Tvos(t) :=
    0 if t == 0
    (Tvos(t - 1) + Δtt(t)) otherwise
Plim(t) := P_i_ksi(t, (t + 1)*Δr, Rarr(t)) - Pmax
kk := 0 .. 12
Tvos_matrix[kk] := Tvos(kk)  # error: Вы прервали вычисление. Чтобы возобновить его, щелкните здесь и нажмите 'F9'.
Rarr_matrix[kk] := Rarr(kk)
Tvos_matrix =  # no stored result
Rarr_matrix  # disabled
